ALLSEL
FINISH
!/OUTPUT

*DEL, MacroFolder, NOPR
*DIM,MacroFolder,STRING,100
MacroFolder(1) = '%Basefolder(1)%/Scripts/PostProcess/Macros/'

/POST1

!disable warning messages.
! /NOPR
! /UIS, MSGPOP, 3
! /NERR, NMERR, NMABT, --, IFKEY, NUM
! /NERR,,,,,0
/NERR, , 99999999

!First start with the common output, then analyis specific data.

!-------------------------
!----- Parameters --------
!-------------------------
*DEL, OutputFilename_
*DIM,OutputFilename_,STRING,248

*GET,MaxNode,NODE,0, NUM, MAXD

!-------------------------
!---- List of Macros -----
!-------------------------
!
!
!	save_results_to_csv
!	save_plot
!	save_plot_as_png !Gets called by save_plot
!	save_plot_as_eps !Gets called by save_plot
!	save_model_parameters
!	save_deformed_shape
!	save_array_to_csv 						!not used atm
!	plot_nodal_solution_eqv_stress			!not used atm
!	plot_loading_graph
!	plot_deformed_shape
!-------------------------
*DEL, saveWithJobname
/INQUIRE, saveWithJobname, JOBNAME, !get the jobname as this is the first part of the plotname
extension = 'png' !Set default extension


!Save all the parameters:
*USE, '%MacroFolder(1)%save_model_parameters.MAC'

!Color the track:
*USE, '%MacroFolder(1)%colorTrack.MAC'
!Save whole model plots
*USE, '%MacroFolder(1)%save_model_plots.MAC'

!Save wapening-mesh
*USE, '%MacroFolder(1)%save_WapeningMesh.MAC'

!Save images of the different materials:
*USE, '%MacroFolder(1)%saveElelementsPerMaterialType.MAC'

!--- Save number of sleeper elements:
*USE, '%MacroFolder(1)%save_elementCount.MAC'

!----------------------------------------------
*DEL, ResultFile, NOPR
*DIM, ResultFile, STRING, 248
/INQUIRE, ResultFile, RSTFILE

*DEL, ResultFilePath, NOPR
*DIM, ResultFilePath, STRING, 248
!ResultFilePath(1) = '%Working_Directory(1)%\%saveWithJobname(1)%\%ResultFile(1)%'
ResultFilePath(1) = '%ResultFile(1)%'
/INQUIRE, ResultFileExists, EXIST, '%ResultFilePath(1)%', rst

*IF, ResultFileExists, EQ, 1, THEN

	INRES,ALL !Identifies the data to be retrieved from the results file. All = All solution items

	!Set load step.
	*GET, AantalLoadSteps, ACTIVE, 0, SET, NSET, ,
	SET, FIRST

	!----------------------------------------------
	!-------- Save data per load step -------------
	!----------------------------------------------
	*DO, LoadCase, 1, AantalLoadSteps, 1
		!*USE, '%MacroFolder(1)%save_plot.MAC', 'Rail cross section'
		ALLSEL
		!----------------------------------------------
		!-------- Common post processing: -------------
		!----------------------------------------------

		!Save plot of deformed shape, with and without baseplate and rail.
		*USE, '%MacroFolder(1)%plot_deformed_shape.MAC', LoadCase

		!Stresses and deformations:
		*IF, '%AnalysisType%', NE, 'modal', THEN,
			/view,1,1,1,1
			PLNSOL, S, EQV, 0 !Equivalent stress
			!OutputFilename_(1) = '%saveWithJobname(1)%_SleeperStresses_%i%'
			!*USE, '%MacroFolder(1)%save_results_to_csv.MAC'
			!*USE, '%MacroFolder(1)%save_plot.MAC', 'SleeperStresses_%i%'
			!PLNSOL, S, 1, 0 !Principal stress
			!*USE, '%MacroFolder(1)%save_plot.MAC', 'SleeperStresses1stPrincipal_%i%'
			!ALLSEL

			!Save center sleeper max and minimal stresses.
			! Essential as it also produces the results needed for Matlab post processing!
			!
			*USE, '%MacroFolder(1)%saveSleeperStresses.MAC', LoadCase

			!Save maximum stresses in reinforcement (extra sleeper id as property)
			*USE, '%MacroFolder(1)%saveReinforcementStresses.MAC', LoadCase, 0

			!Save deformation of foundation nodes
			*USE, '%MacroFolder(1)%saveFoundationStresses.MAC', LoadCase

			!Save deformation of rail nodes + gauge nodes
			*USE, '%MacroFolder(1)%saveRailStresses.MAC', LoadCase

			!Save deformation of rughellingplaat / base plate nodes
			*USE, '%MacroFolder(1)%saveBasePlateStresses.MAC', LoadCase

			!*USE, '%MacroFolder(1)%saveGaugeWidening.MAC', LoadCase

			!Save reaction forces per sleeper
			*GET, DoesCompExists, COMP, ConstrainedNodes, TYPE

			*IF, DoesCompExists, GT, 0, THEN
				!Save reaction forces
				*USE, '%MacroFolder(1)%save_reaction_forces.MAC', LoadCase
			*ENDIF
		*ENDIF
		ALLSEL
		SET,NEXT !Select next load step / result
	*ENDDO

	*IF, '%AnalysisType%', NE, 'modal', THEN,
		ALLSEL
		!Save loading graph
		*USE, '%MacroFolder(1)%plot_loading_graph.MAC'
		*USE, '%MacroFolder(1)%save_plot.MAC', 'Loads'

	*ELSEIF, '%AnalysisType%', EQ, 'modal', THEN,
		!Save frequencies
		*USE, '%MacroFolder(1)%save_eigenfrequencies.MAC'

	*ENDIF
*ENDIF
/GOPR

*DEL, ResultFileExists
*DEL, i
*DEL, AantalLoadSteps
*DEL, ResultFile
*DEL, ResultFilePath

T = 'Post Processing finished'

FINISH
